<?xml version="1.0"?>
<?xml-stylesheet type="text/xsl" href="http://jsbsim.sourceforge.net/JSBSim.xsl"?>
<fdm_config name="B-1B" version="2.0" release="ALPHA"
   xmlns:xsi="http://www.w3.org/2001/XMLSchema-instance"
   xsi:noNamespaceSchemaLocation="http://jsbsim.sourceforge.net/JSBSim.xsd">

 <fileheader>
  <author> Aeromatic v 0.96 </author>
  <filecreationdate>2023-11-18</filecreationdate>
  <version>$Revision: 1.20 $</version>
  <description> Models a B-1B. </description>
 </fileheader>

<!--
  File:     B-1B.xml
  Inputs:
    name:          B-1B
    type:          two-engine transonic/supersonic fighter
    max weight:    477000 lb
    wing span:     137 ft
    length:        146 ft
    wing area:     1946 sq-ft
    gear type:     tricycle
    castering:
    retractable?:  yes
    # engines:     4
    engine type:   turbine
    engine layout: middle fuselage
    yaw damper?    yes
  Outputs:
    wing loading:  245.12 lb/sq-ft
    payload:       191454.0 lbs
    CL-alpha:      3.6 per radian
    CL-0:          0.08
    CL-max:        1
    CD-0:          0.024
    K:             0.12

-->

 <metrics>
   <wingarea  unit="FT2"> 1946.00 </wingarea>
   <wingspan  unit="FT" >  137.00 </wingspan>
   <wing_incidence>          2.00 </wing_incidence>
   <chord     unit="FT" >   14.20 </chord>
   <htailarea unit="FT2">  509.00 </htailarea>
   <htailarm  unit="FT" >   65.25 </htailarm>
   <vtailarea unit="FT2">  247.40 </vtailarea>
   <vtailarm  unit="FT" >   65.25 </vtailarm>
   <location name="AERORP" unit="IN">
     <x> 969.00 </x>
     <y>   0.00 </y>
     <z>   0.00 </z>
   </location>
   <location name="EYEPOINT" unit="IN">
     <x> 350.40 </x>
     <y>   0.00 </y>
     <z>  38.00 </z>
   </location>
   <location name="VRP" unit="IN">
     <x>0</x>
     <y>0</y>
     <z>0</z>
   </location>
 </metrics>

 <mass_balance>
   <ixx unit="SLUG*FT2">   2289362 </ixx>
   <iyy unit="SLUG*FT2">   3573887 </iyy>
   <izz unit="SLUG*FT2">   4881552 </izz>
   <emptywt unit="LBS" >    186807 </emptywt>
   <location name="CG" unit="IN">
     <x> 969.00 </x>
     <y>   0.00 </y>
     <z> -43.80 </z>
   </location>
 </mass_balance>
    <system file="eng_ind.xml"/>
    <system file="b1b-engines.xml"/>
    <system file="b1b-pneumatic.xml"/>
    <system file="b1b-electrical.xml"/>
 <ground_reactions>

  <contact type="BOGEY" name="NOSE">
   <location unit="IN">
     <x> 360.25 </x>
     <y>   0.00 </y>
     <z> -121.5 </z>
   </location>
   <static_friction>  0.80 </static_friction>
   <dynamic_friction> 0.50 </dynamic_friction>
   <rolling_friction> 0.02 </rolling_friction>
   <spring_coeff unit="LBS/FT">      143100.00 </spring_coeff>
   <damping_coeff unit="LBS/FT/SEC"> 71550.00 </damping_coeff>
   <max_steer unit="DEG"> 5.00 </max_steer>
   <brake_group>NONE</brake_group>
   <retractable>1</retractable>
  </contact>

  <contact type="BOGEY" name="LEFT_MAIN">
   <location unit="IN">
     <x> 1038.0 </x>
     <y> -87.0 </y>
     <z> -122.45 </z>
   </location>
   <static_friction>  0.80 </static_friction>
   <dynamic_friction> 0.50 </dynamic_friction>
   <rolling_friction> 0.02 </rolling_friction>
   <spring_coeff unit="LBS/FT">      477000.00 </spring_coeff>
   <damping_coeff unit="LBS/FT/SEC"> 238500.00 </damping_coeff>
   <max_steer unit="DEG">0</max_steer>
   <brake_group>LEFT</brake_group>
   <retractable>1</retractable>
  </contact>

  <contact type="BOGEY" name="RIGHT_MAIN">
   <location unit="IN">
     <x> 1038.0 </x>
     <y> 87.0 </y>
     <z> -122.45 </z>
   </location>
   <static_friction>  0.80 </static_friction>
   <dynamic_friction> 0.50 </dynamic_friction>
   <rolling_friction> 0.02 </rolling_friction>
   <spring_coeff unit="LBS/FT">      477000.00 </spring_coeff>
   <damping_coeff unit="LBS/FT/SEC"> 238500.00 </damping_coeff>
   <max_steer unit="DEG">0</max_steer>
   <brake_group>RIGHT</brake_group>
   <retractable>1</retractable>
  </contact>

    <contact type="STRUCTURE" name="RADOME">
        <location unit="IN"> <!-- B-1B Fact Book -->
            <x> 39.46 </x>
            <y>  0.0  </y>
            <z>  0.0  </z>
        </location>
        <static_friction>  1.00 </static_friction>
        <dynamic_friction> 1.00 </dynamic_friction>
        <spring_coeff unit="LBS/FT">      477000.00 </spring_coeff>
        <damping_coeff unit="LBS/FT/SEC"> 477000.00 </damping_coeff>
    </contact>


  <contact type="STRUCTURE" name="LEFT_WING">
    <location unit="IN">
     <x> 969.00 </x>
     <y> -68.50 </y>
     <z> -43.80 </z>
    </location>
    <static_friction>  1.00 </static_friction>
    <dynamic_friction> 1.00 </dynamic_friction>
    <spring_coeff unit="LBS/FT">      477000.00 </spring_coeff>
    <damping_coeff unit="LBS/FT/SEC"> 477000.00 </damping_coeff>
  </contact>

  <contact type="STRUCTURE" name="RIGHT_WING">
    <location unit="IN">
     <x> 969.00 </x>
     <y>  68.50 </y>
     <z> -43.80 </z>
    </location>
    <static_friction>  1.00 </static_friction>
    <dynamic_friction> 1.00 </dynamic_friction>
    <spring_coeff unit="LBS/FT">      477000.00 </spring_coeff>
    <damping_coeff unit="LBS/FT/SEC"> 477000.00 </damping_coeff>
  </contact>

 </ground_reactions>

 <propulsion>

   <engine file="F101-GE-102">
    <location unit="IN">
      <x> 969.00 </x>
      <y> -60.00 </y>
      <z> -12.00 </z>
    </location>
    <orient unit="DEG">
      <pitch> 0.00 </pitch>
      <roll>  0.00 </roll>
      <yaw>   0.00 </yaw>
    </orient>
    <feed>0</feed>
    <thruster file="direct">
     <location unit="IN">
       <x> 969.00 </x>
       <y> -60.00 </y>
       <z> -12.00 </z>
     </location>
     <orient unit="DEG">
       <pitch> 0.00 </pitch>
       <roll>  0.00 </roll>
       <yaw>   0.00 </yaw>
     </orient>
    </thruster>
  </engine>

   <engine file="F101-GE-102">
    <location unit="IN">
      <x> 969.00 </x>
      <y> -20.00 </y>
      <z> -12.00 </z>
    </location>
    <orient unit="DEG">
      <pitch> 0.00 </pitch>
      <roll>  0.00 </roll>
      <yaw>   0.00 </yaw>
    </orient>
    <feed>1</feed>
    <thruster file="direct">
     <location unit="IN">
       <x> 969.00 </x>
       <y> -20.00 </y>
       <z> -12.00 </z>
     </location>
     <orient unit="DEG">
       <pitch> 0.00 </pitch>
       <roll>  0.00 </roll>
       <yaw>   0.00 </yaw>
     </orient>
    </thruster>
  </engine>

   <engine file="F101-GE-102">
    <location unit="IN">
      <x> 969.00 </x>
      <y>  20.00 </y>
      <z> -12.00 </z>
    </location>
    <orient unit="DEG">
      <pitch> 0.00 </pitch>
      <roll>  0.00 </roll>
      <yaw>   0.00 </yaw>
    </orient>
    <feed>2</feed>
    <thruster file="direct">
     <location unit="IN">
       <x> 969.00 </x>
       <y>  20.00 </y>
       <z> -12.00 </z>
     </location>
     <orient unit="DEG">
       <pitch> 0.00 </pitch>
       <roll>  0.00 </roll>
       <yaw>   0.00 </yaw>
     </orient>
    </thruster>
  </engine>

   <engine file="F101-GE-102">
    <location unit="IN">
      <x> 969.00 </x>
      <y>  60.00 </y>
      <z> -12.00 </z>
    </location>
    <orient unit="DEG">
      <pitch> 0.00 </pitch>
      <roll>  0.00 </roll>
      <yaw>   0.00 </yaw>
    </orient>
    <feed>3</feed>
    <thruster file="direct">
     <location unit="IN">
       <x> 969.00 </x>
       <y>  60.00 </y>
       <z> -12.00 </z>
     </location>
     <orient unit="DEG">
       <pitch> 0.00 </pitch>
       <roll>  0.00 </roll>
       <yaw>   0.00 </yaw>
     </orient>
    </thruster>
  </engine>
      <engine file="GTCP165-9A">
    <feed> 0 </feed>

    <thruster file="direct">
     <sense> 1 </sense>
    <location unit="IN">
      <x> 969.00 </x>
      <y>   0.00 </y>
      <z> -43.80 </z>
    </location>
     <orient unit="DEG">
       <pitch>     0.00 </pitch>
        <roll>     0.00 </roll>
         <yaw>     0.00 </yaw>
     </orient>
    </thruster>
  </engine>
     <engine file="GTCP165-9A">
    <feed> 0 </feed>

    <thruster file="direct">
     <sense> 1 </sense>
    <location unit="IN">
      <x> 969.00 </x>
      <y>   0.00 </y>
      <z> -43.80 </z>
    </location>
     <orient unit="DEG">
       <pitch>     0.00 </pitch>
        <roll>     0.00 </roll>
         <yaw>     0.00 </yaw>
     </orient>
    </thruster>
  </engine>


  <tank type="FUEL" number="0">
     <location unit="IN">
       <x> 969.00 </x>
       <y>   0.00 </y>
       <z> -43.80 </z>
     </location>
     <capacity unit="LBS"> 19747.80 </capacity>
     <contents unit="LBS"> 9873.90 </contents>
  </tank>

  <tank type="FUEL" number="1">
     <location unit="IN">
       <x> 969.00 </x>
       <y>   0.00 </y>
       <z> -43.80 </z>
     </location>
     <capacity unit="LBS"> 19747.80 </capacity>
     <contents unit="LBS"> 9873.90 </contents>
  </tank>

  <tank type="FUEL" number="2">
     <location unit="IN">
       <x> 969.00 </x>
       <y>   0.00 </y>
       <z> -43.80 </z>
     </location>
     <capacity unit="LBS"> 19747.80 </capacity>
     <contents unit="LBS"> 9873.90 </contents>
  </tank>

  <tank type="FUEL" number="3">
     <location unit="IN">
       <x> 969.00 </x>
       <y>   0.00 </y>
       <z> -43.80 </z>
     </location>
     <capacity unit="LBS"> 19747.80 </capacity>
     <contents unit="LBS"> 9873.90 </contents>
  </tank>

  <tank type="FUEL" number="4">
     <location unit="IN">
       <x> 969.00 </x>
       <y>   0.00 </y>
       <z> -43.80 </z>
     </location>
     <capacity unit="LBS"> 19747.80 </capacity>
     <contents unit="LBS"> 9873.90 </contents>
  </tank>

 </propulsion>

 <flight_control name="FCS: B-1B">
  <channel name="Elevon">

   <summer name="fcs/roll-trim-sum">
      <input>fcs/aileron-cmd-norm</input>
      <input>fcs/roll-trim-cmd-norm</input>
      <clipto>
        <min> -1 </min>
        <max>  1 </max>
      </clipto>
   </summer>

   <pure_gain name="fcs/elevon-gain">
       <input>fcs/roll-trim-sum</input>
       <gain>0.3</gain>
   </pure_gain>

   <summer name="fcs/left-elevon-sum">
      <input>fcs/elevator-cmd-norm</input>
      <input>fcs/pitch-trim-cmd-norm</input>
       <input>-fcs/elevon-gain</input>
      <clipto>
        <min> -1 </min>
        <max>  1 </max>
      </clipto>
   </summer>

  <summer name="fcs/right-elevon-sum">
      <input>fcs/elevator-cmd-norm</input>
      <input>fcs/pitch-trim-cmd-norm</input>
      <input>fcs/elevon-gain</input>
      <clipto>
        <min> -1 </min>
        <max>  1 </max>
      </clipto>
   </summer>

   <aerosurface_scale name="Left Elevator Control">
      <input>fcs/left-elevon-sum</input>
      <range>
        <min> -0.35 </min>
        <max>  0.35 </max>
      </range>
      <output>fcs/left-elevator-pos-rad</output>
   </aerosurface_scale>

   <aerosurface_scale name="fcs/left-elevator-pos-norm">
      <input>fcs/left-elevator-pos-rad</input>
      <domain>
        <min> -0.35 </min>
        <max>  0.35 </max>
      </domain>
      <range>
        <min> -1 </min>
        <max>  1 </max>
      </range>
      <output>/surface-positions/left-elevator-pos-norm</output>
   </aerosurface_scale>
   <aerosurface_scale name="Right Elevator Control">
      <input>fcs/right-elevon-sum</input>
      <range>
        <min> -0.35 </min>
        <max>  0.35 </max>
      </range>
      <output>fcs/right-elevator-pos-rad</output>
   </aerosurface_scale>

   <aerosurface_scale name="fcs/right-elevator-pos-norm">
      <input>fcs/right-elevator-pos-rad</input>
      <domain>
        <min> -0.35 </min>
        <max>  0.35 </max>
      </domain>
      <range>
        <min> -1 </min>
        <max>  1 </max>
      </range>
      <output>/surface-positions/right-elevator-pos-norm</output>
   </aerosurface_scale>

   <summer name="fcs/elevator-pos-norm-sum">
       <input>fcs/left-elevator-pos-norm</input>
       <input>fcs/right-elevator-pos-norm</input>
   </summer>
      <pure_gain name="fcs/elevator-pos-norm">
          <input>fcs/elevator-pos-norm-sum</input>
          <gain>0.5</gain>
      </pure_gain>
      <summer name="fcs/elevator-pos-rad-sum">
       <input>fcs/left-elevator-pos-rad</input>
       <input>fcs/right-elevator-pos-rad</input>
   </summer>
      <pure_gain name="fcs/elevator-pos-rad">
          <input>fcs/elevator-pos-norm-sum</input>
          <gain>0.5</gain>
      </pure_gain>

   <summer name="fcs/aileron-pos-sum">
       <input>-fcs/left-elevator-pos-rad</input>
       <input>fcs/right-elevator-pos-rad</input>
   </summer>
   <pure_gain name="fcs/aileron-pos-rad">
       <input>fcs/aileron-pos-sum</input>
       <gain>0.5</gain>
   </pure_gain>
  </channel>

  <property value="1">fcs/yaw-damper-enable</property>
  <channel name="Yaw">

   <summer name="Rudder Command Sum">
      <input>fcs/rudder-cmd-norm</input>
      <input>fcs/yaw-trim-cmd-norm</input>
      <clipto>
        <min> -1 </min>
        <max>  1 </max>
      </clipto>
   </summer>

   <scheduled_gain name="Yaw Damper Rate">
      <input>velocities/r-aero-rad_sec</input>
      <table>
        <independentVar lookup="row">velocities/ve-kts</independentVar>
         <tableData>
            30     0.00
            60     2.00
         </tableData>
      </table>
      <gain>fcs/yaw-damper-enable</gain>
   </scheduled_gain>

   <summer name="Rudder Sum">
      <input>fcs/rudder-command-sum</input>
      <input>fcs/yaw-damper-rate</input>
      <clipto>
        <min> -1.1 </min>
        <max>  1.1 </max>
      </clipto>
   </summer>

   <aerosurface_scale name="Rudder Control">
      <input>fcs/rudder-sum</input>
      <domain>
        <min> -1.1 </min>
        <max>  1.1 </max>
      </domain>
      <range>
        <min> -0.35 </min>
        <max>  0.35 </max>
      </range>
      <output>fcs/rudder-pos-rad</output>
   </aerosurface_scale>

   <aerosurface_scale name="rudder normalization">
      <input>fcs/rudder-pos-rad</input>
      <domain>
        <min> -0.35 </min>
        <max>  0.35 </max>
      </domain>
      <range>
        <min> -1 </min>
        <max>  1 </max>
      </range>
      <output>fcs/rudder-pos-norm</output>
   </aerosurface_scale>

  </channel>

  <channel name="Flaps">
   <kinematic name="Flaps Control">
     <input>fcs/flap-cmd-norm</input>
     <traverse>
       <setting>
          <position>  0 </position>
          <time>      0 </time>
       </setting>
       <setting>
          <position> 15 </position>
          <time>      4 </time>
       </setting>
       <setting>
          <position> 30 </position>
          <time>      3 </time>
       </setting>
     </traverse>
     <output>fcs/flap-pos-deg</output>
   </kinematic>

   <aerosurface_scale name="flap normalization">
      <input>fcs/flap-pos-deg</input>
      <domain>
        <min>  0 </min>
        <max> 30 </max>
      </domain>
      <range>
        <min> 0 </min>
        <max> 1 </max>
      </range>
      <output>fcs/flap-pos-norm</output>
   </aerosurface_scale>

  </channel>

  <channel name="Landing Gear">
   <kinematic name="Gear Control">
     <input>gear/gear-cmd-norm</input>
     <traverse>
       <setting>
          <position> 0 </position>
          <time>     0 </time>
       </setting>
       <setting>
          <position> 1 </position>
          <time>     5 </time>
       </setting>
     </traverse>
     <output>gear/gear-pos-norm</output>
   </kinematic>

  </channel>

  <channel name="Speedbrake">
   <kinematic name="Speedbrake Control">
     <input>fcs/speedbrake-cmd-norm</input>
     <traverse>
       <setting>
          <position> 0 </position>
          <time>     0 </time>
       </setting>
       <setting>
          <position> 1 </position>
          <time>     1 </time>
       </setting>
     </traverse>
     <output>fcs/speedbrake-pos-norm</output>
   </kinematic>

  </channel>

 </flight_control>

 <aerodynamics>

  <axis name="LIFT">

    <function name="aero/force/Lift_alpha">
      <description>Lift due to alpha</description>
      <product>
          <property>aero/qbar-psf</property>
          <property>metrics/Sw-sqft</property>
          <table>
            <independentVar lookup="row">aero/alpha-rad</independentVar>
            <tableData>
              -0.20 -0.640
               0.00  0.080
               0.26  1.000
               0.60  0.448
            </tableData>
          </table>
          <property>tune/lift/alpha</property>
      </product>
    </function>

<!--      Pitch rate lift removed -->
<!--      Alpha rate lift removed -->

    <function name="aero/force/Lift_flap">
       <description>Delta Lift due to flaps</description>
       <product>
           <property>aero/qbar-psf</property>
           <property>metrics/Sw-sqft</property>
           <property>fcs/flap-pos-deg</property>
           <value> 0.01167 </value>
           <property>tune/lift/flap</property>
       </product>
    </function>

    <function name="aero/force/Lift_speedbrake">
       <description>Delta Lift due to speedbrake</description>
       <product>
           <property>aero/qbar-psf</property>
           <property>metrics/Sw-sqft</property>
           <property>fcs/speedbrake-pos-norm</property>
           <value>0</value>
           <property>tune/lift/speedbrake</property>
       </product>
    </function>

    <function name="aero/force/Lift_elevator">
       <description>Lift due to Elevator Deflection</description>
       <product>
           <property>aero/qbar-psf</property>
           <property>metrics/Sw-sqft</property>
           <property>fcs/elevator-pos-rad</property>
           <value>0.2</value>
           <property>tune/lift/elevator</property>
       </product>
    </function>

  </axis>

  <axis name="DRAG">

    <function name="aero/force/Drag_basic">
       <description>Drag at zero lift</description>
       <product>
          <property>aero/qbar-psf</property>
          <property>metrics/Sw-sqft</property>
          <table>
            <independentVar lookup="row">aero/alpha-rad</independentVar>
            <tableData>
             -1.57    1.500
             -0.26    0.031
              0.00    0.024
              0.26    0.031
              1.57    1.500
            </tableData>
          </table>
          <property>tune/drag/basic</property>
       </product>
    </function>

    <function name="aero/force/Drag_induced">
       <description>Induced drag</description>
         <product>
           <property>aero/qbar-psf</property>
           <property>metrics/Sw-sqft</property>
           <property>aero/cl-squared</property>
           <value>0.12</value>
           <property>tune/drag/induced</property>
         </product>
    </function>

    <function name="aero/force/Drag_mach">
       <description>Drag due to mach</description>
        <product>
          <property>aero/qbar-psf</property>
          <property>metrics/Sw-sqft</property>
          <table>
            <independentVar lookup="row">velocities/mach</independentVar>
            <tableData>
                0.00      0.000
                0.81      0.000
                1.10      0.023
                1.80      0.015
            </tableData>
          </table>
          <property>tune/drag/mach</property>
        </product>
    </function>

    <function name="aero/force/Drag_flap">
       <description>Drag due to flaps</description>
         <product>
           <property>aero/qbar-psf</property>
           <property>metrics/Sw-sqft</property>
           <property>fcs/flap-pos-deg</property>
           <value> 0.00250 </value>
          <property>tune/drag/flap</property>
         </product>
    </function>

    <function name="aero/force/Drag_gear">
       <description>Drag due to gear</description>
         <product>
           <property>aero/qbar-psf</property>
           <property>metrics/Sw-sqft</property>
           <property>gear/gear-pos-norm</property>
           <value>0.02</value>
          <property>tune/drag/gear</property>
         </product>
    </function>

    <function name="aero/force/Drag_speedbrake">
       <description>Drag due to speedbrakes</description>
         <product>
           <property>aero/qbar-psf</property>
           <property>metrics/Sw-sqft</property>
           <property>fcs/speedbrake-pos-norm</property>
           <value>0.024</value>
          <property>tune/drag/speedbrake</property>
         </product>
    </function>

    <function name="aero/force/Drag_beta">
       <description>Drag due to sideslip</description>
       <product>
          <property>aero/qbar-psf</property>
          <property>metrics/Sw-sqft</property>
          <table>
            <independentVar lookup="row">aero/beta-rad</independentVar>
            <tableData>
              -1.57    1.230
              -0.26    0.050
               0.00    0.000
               0.26    0.050
               1.57    1.230
            </tableData>
          <property>tune/drag/beta</property>
          </table>
       </product>
    </function>

    <function name="aero/force/Drag_elevator">
       <description>Drag due to Elevator Deflection</description>
       <product>
           <property>aero/qbar-psf</property>
           <property>metrics/Sw-sqft</property>
           <abs><property>fcs/elevator-pos-norm</property></abs>
           <value>0.04</value>
          <property>tune/drag/elevator</property>
       </product>
    </function>

  </axis>

  <axis name="SIDE">

    <function name="aero/force/Side_beta">
       <description>Side force due to beta</description>
       <product>
           <property>aero/qbar-psf</property>
           <property>metrics/Sw-sqft</property>
           <property>aero/beta-rad</property>
           <value>-1</value>
          <property>tune/side/beta</property>
       </product>
    </function>
<!--      TODO: Rudder? -->

  </axis>

  <axis name="ROLL">

    <function name="aero/moment/Roll_beta">
       <description>Roll moment due to beta</description>
       <product>
           <property>aero/qbar-psf</property>
           <property>metrics/Sw-sqft</property>
           <property>metrics/bw-ft</property>
           <property>aero/beta-rad</property>
           <value>-0.1</value>
          <property>tune/roll/beta</property>
       </product>
    </function>

    <function name="aero/moment/Roll_damp">
       <description>Roll moment due to roll rate</description>
       <product>
           <property>aero/qbar-psf</property>
           <property>metrics/Sw-sqft</property>
           <property>metrics/bw-ft</property>
           <property>aero/bi2vel</property>
           <property>velocities/p-aero-rad_sec</property>
           <value>-0.4</value>
           <property>tune/roll/damp</property>
       </product>
    </function>

    <function name="aero/moment/Roll_yaw">
       <description>Roll moment due to yaw rate</description>
       <product>
           <property>aero/qbar-psf</property>
           <property>metrics/Sw-sqft</property>
           <property>metrics/bw-ft</property>
           <property>aero/bi2vel</property>
           <property>velocities/r-aero-rad_sec</property>
           <value>0.15</value>
           <property>tune/roll/yaw</property>
       </product>
    </function>

    <function name="aero/moment/Roll_aileron">
       <description>Roll moment due to aileron</description>
       <product>
          <property>aero/qbar-psf</property>
          <property>metrics/Sw-sqft</property>
          <property>metrics/bw-ft</property>
          <property>fcs/aileron-pos-rad</property>
          <value>0.12</value>
           <property>tune/roll/aileron</property>
       </product>
    </function>

    <function name="aero/moment/Roll_rudder">
       <description>Roll moment due to rudder</description>
       <product>
           <property>aero/qbar-psf</property>
           <property>metrics/Sw-sqft</property>
           <property>metrics/bw-ft</property>
           <property>fcs/rudder-pos-rad</property>
           <value>0.01</value>
           <property>tune/roll/rudder</property>
       </product>
    </function>

  </axis>

  <axis name="PITCH">

    <function name="aero/moment/Pitch_alpha">
       <description>Pitch moment due to alpha</description>
       <product>
           <property>aero/qbar-psf</property>
           <property>metrics/Sw-sqft</property>
           <property>metrics/cbarw-ft</property>
           <property>aero/alpha-rad</property>
           <value>-0.3</value>
           <property>tune/pitch/alpha</property>
       </product>
    </function>

    <function name="aero/moment/Pitch_elevator">
       <description>Pitch moment due to elevator</description>
       <product>
          <property>aero/qbar-psf</property>
          <property>metrics/Sw-sqft</property>
          <property>metrics/cbarw-ft</property>
          <property>fcs/elevator-pos-rad</property>
          <table>
            <independentVar lookup="row">velocities/mach</independentVar>
            <tableData>
              0.0     -0.200
              2.0     -0.050
            </tableData>
          </table>
           <property>tune/pitch/elevator</property>
       </product>
    </function>

    <function name="aero/moment/Pitch_damp">
       <description>Pitch moment due to pitch rate</description>
       <product>
           <property>aero/qbar-psf</property>
           <property>metrics/Sw-sqft</property>
           <property>metrics/cbarw-ft</property>
           <property>aero/ci2vel</property>
           <property>velocities/q-aero-rad_sec</property>
           <value>-18</value>
           <property>tune/pitch/damp</property>
       </product>
    </function>

    <function name="aero/moment/Pitch_alphadot">
       <description>Pitch moment due to alpha rate</description>
       <product>
           <property>aero/qbar-psf</property>
           <property>metrics/Sw-sqft</property>
           <property>metrics/cbarw-ft</property>
           <property>aero/ci2vel</property>
           <property>aero/alphadot-rad_sec</property>
           <value>-9</value>
           <property>tune/pitch/alphadot</property>
       </product>
    </function>

  </axis>

  <axis name="YAW">

    <function name="aero/moment/Yaw_beta">
       <description>Yaw moment due to beta</description>
       <product>
           <property>aero/qbar-psf</property>
           <property>metrics/Sw-sqft</property>
           <property>metrics/bw-ft</property>
           <property>aero/beta-rad</property>
           <value>0.12</value>
           <property>tune/yaw/beta</property>
       </product>
    </function>

    <function name="aero/moment/Yaw_damp">
       <description>Yaw moment due to yaw rate</description>
       <product>
           <property>aero/qbar-psf</property>
           <property>metrics/Sw-sqft</property>
           <property>metrics/bw-ft</property>
           <property>aero/bi2vel</property>
           <property>velocities/r-aero-rad_sec</property>
           <value>-0.15</value>
           <property>tune/yaw/damp</property>
       </product>
    </function>

    <function name="aero/moment/Yaw_rudder">
       <description>Yaw moment due to rudder</description>
       <product>
           <property>aero/qbar-psf</property>
           <property>metrics/Sw-sqft</property>
           <property>metrics/bw-ft</property>
           <property>fcs/rudder-pos-rad</property>
           <value>-0.1</value>
           <property>tune/yaw/rudder</property>
       </product>
    </function>

    <function name="aero/moment/Yaw_aileron">
       <description>Adverse yaw</description>
       <product>
           <property>aero/qbar-psf</property>
           <property>metrics/Sw-sqft</property>
           <property>metrics/bw-ft</property>
           <property>fcs/aileron-pos-rad</property>
           <value>0</value>
           <property>tune/yaw/aileron</property>
       </product>
    </function>

  </axis>

 </aerodynamics>

 <external_reactions>
 </external_reactions>

</fdm_config>
